OpenVSP model (file version 5), 2 components.
Geometry view with OpenVSP parameter names; values to 6 digits, angles in degrees, lengths in the model's unit.
Overall bounding box: X_Min=-0.5 X_Len=1 Y_Min=-0.5 Y_Len=1.0009 Z_Min=-0.0244068 Z_Len=0.0496969

Propeller "Rotor_blades"
  location (X Y Z) 0 0 0, rotation 0 90 0
  bounding box size 0.898548 0.78527 0.0496969
  Design: Diameter=1 NumBlade=3 Beta34=20 UseBeta34Flag=1 Feather=0 Rotate=0 Precone=0 ReverseFlag=0 FoldAngle=0 PropMode=0 AF=151.538 CLi=0.538798 Chord=0.177656 Solidity=0.169649 ConstructXoC=0.5 FeatherAxisXoC=0.5 FeatherOffsetXoC=0
  cross sections:
    n  RadiusFrac  shape
    0  0.2         ellipse Ellipse_Height=0.02 Ellipse_Width=0.04
    1  0.4         NACA 16-series Chord=0.083125 IdealCl=0.7 ThickChord=0.144074
    2  1           NACA 16-series Chord=0.065 IdealCl=0.2 ThickChord=0.03
  Chord along r/R (cubic Bezier): 0.2: 0.08, 0.333333: 0.15, 0.466667: 0.2, 0.6: 0.2, 0.716667: 0.2, 0.833333: 0.2, 0.95: 0.2, 0.966667: 0.2, 0.983333: 0.2, 1: 0.13
  Twist along r/R (PCHIP): 0.2: 46.75, 0.75: 20, 1: 13
  Thick along r/R (cubic Bezier): 0.2: 0.5, 0.233333: 0.3, 0.266667: 0.225, 0.3: 0.2, 0.4: 0.125, 0.5: 0.115, 0.6: 0.1, 0.733333: 0.075, 0.866667: 0.055, 1: 0.03
  CLI along r/R (cubic Bezier): 0.2: 0, 0.266667: 0.7, 0.333333: 0.7, 0.4: 0.7, 0.466667: 0.7, 0.533333: 0.7, 0.6: 0.7, 0.733333: 0.7, 0.866667: 0.7, 1: 0.2

Propeller "Rotor_disk", child of "Rotor_blades"
  location (X Y Z) 0 0 0, rotation 0 90 0
  bounding box size 1 1 0
  Design: Diameter=1 NumBlade=3 Beta34=20 UseBeta34Flag=1 Feather=0 Rotate=0 Precone=0 ReverseFlag=0 FoldAngle=0 PropMode=2 AF=151.538 CLi=0.538798 Chord=0.177656 Solidity=0.169649 ConstructXoC=0.5 FeatherAxisXoC=0.5 FeatherOffsetXoC=0
  cross sections:
    n  RadiusFrac  shape
    0  0.2         ellipse Ellipse_Height=0.02 Ellipse_Width=0.04
    1  0.4         NACA 16-series Chord=0.083125 IdealCl=0.7 ThickChord=0.144074
    2  1           NACA 16-series Chord=0.065 IdealCl=0.2 ThickChord=0.03
  blade curves as in "Rotor_blades"
