OpenVSP model (file version 5), 4 components.
Geometry view with OpenVSP parameter names; values to 6 digits, angles in degrees, lengths in the model's unit.
Overall bounding box: X_Min=-15 X_Len=30 Y_Min=-55.027 Y_Len=110.054 Z_Min=-0.732204 Z_Len=1.49091

Propeller "Rotor_1_blades"
  location (X Y Z) 0 40 0, rotation 0 90 0
  bounding box size 26.9564 23.5581 1.49091
  Design: Diameter=30 NumBlade=3 Beta34=20 UseBeta34Flag=1 Feather=0 Rotate=0 Precone=0 ReverseFlag=0 FoldAngle=0 PropMode=0 AF=151.538 CLi=0.538798 Chord=0.177656 Solidity=0.169649 ConstructXoC=0.5 FeatherAxisXoC=0.5 FeatherOffsetXoC=0
  cross sections:
    n  RadiusFrac  shape
    0  0.2         ellipse Ellipse_Height=0.6 Ellipse_Width=1.2
    1  0.4         NACA 16-series Chord=2.49375 IdealCl=0.7 ThickChord=0.144074
    2  1           NACA 16-series Chord=1.95 IdealCl=0.2 ThickChord=0.03
  Chord along r/R (cubic Bezier): 0.2: 0.08, 0.333333: 0.15, 0.466667: 0.2, 0.6: 0.2, 0.716667: 0.2, 0.833333: 0.2, 0.95: 0.2, 0.966667: 0.2, 0.983333: 0.2, 1: 0.13
  Twist along r/R (PCHIP): 0.2: 46.75, 0.75: 20, 1: 13
  Thick along r/R (cubic Bezier): 0.2: 0.5, 0.233333: 0.3, 0.266667: 0.225, 0.3: 0.2, 0.4: 0.125, 0.5: 0.115, 0.6: 0.1, 0.733333: 0.075, 0.866667: 0.055, 1: 0.03
  CLI along r/R (cubic Bezier): 0.2: 0, 0.266667: 0.7, 0.333333: 0.7, 0.4: 0.7, 0.466667: 0.7, 0.533333: 0.7, 0.6: 0.7, 0.733333: 0.7, 0.866667: 0.7, 1: 0.2

Propeller "Rotor_1_disk", child of "Rotor_1_blades"
  location (X Y Z) 0 40 0, rotation 0 90 0
  bounding box size 30 30 0
  Design: Diameter=30 NumBlade=3 Beta34=20 UseBeta34Flag=1 Feather=0 Rotate=0 Precone=0 ReverseFlag=0 FoldAngle=0 PropMode=2 AF=151.538 CLi=0.538798 Chord=0.177656 Solidity=0.169649 ConstructXoC=0.5 FeatherAxisXoC=0.5 FeatherOffsetXoC=0
  cross sections:
    n  RadiusFrac  shape
    0  0.2         ellipse Ellipse_Height=0.6 Ellipse_Width=1.2
    1  0.4         NACA 16-series Chord=2.49375 IdealCl=0.7 ThickChord=0.144074
    2  1           NACA 16-series Chord=1.95 IdealCl=0.2 ThickChord=0.03
  blade curves as in "Rotor_1_blades"

Propeller "Rotor_2_blades"
  location (X Y Z) 0 -40 0, rotation 0 90 0
  bounding box size 26.9564 23.5581 1.49091
  Design: Diameter=30 NumBlade=3 Beta34=20 UseBeta34Flag=1 Feather=0 Rotate=60 Precone=0 ReverseFlag=1 FoldAngle=0 PropMode=0 AF=151.538 CLi=0.538798 Chord=0.177656 Solidity=0.169649 ConstructXoC=0.5 FeatherAxisXoC=0.5 FeatherOffsetXoC=0
  cross sections:
    n  RadiusFrac  shape
    0  0.2         ellipse Ellipse_Height=0.6 Ellipse_Width=1.2
    1  0.4         NACA 16-series Chord=2.49375 IdealCl=0.7 ThickChord=0.144074
    2  1           NACA 16-series Chord=1.95 IdealCl=0.2 ThickChord=0.03
  blade curves as in "Rotor_1_blades"

Propeller "Rotor_2_disk", child of "Rotor_2_blades"
  location (X Y Z) 0 -40 0, rotation 0 90 0
  bounding box size 30 30 0
  Design: Diameter=30 NumBlade=3 Beta34=20 UseBeta34Flag=1 Feather=0 Rotate=60 Precone=0 ReverseFlag=1 FoldAngle=0 PropMode=2 AF=151.538 CLi=0.538798 Chord=0.177656 Solidity=0.169649 ConstructXoC=0.5 FeatherAxisXoC=0.5 FeatherOffsetXoC=0
  cross sections:
    n  RadiusFrac  shape
    0  0.2         ellipse Ellipse_Height=0.6 Ellipse_Width=1.2
    1  0.4         NACA 16-series Chord=2.49375 IdealCl=0.7 ThickChord=0.144074
    2  1           NACA 16-series Chord=1.95 IdealCl=0.2 ThickChord=0.03
  blade curves as in "Rotor_1_blades"
